// COMSOL Multiphysics 6.0.0.318 model "Case1_first.mph"
// Outline of the model tree

Parameters
  l = 0.002 [m]
  step = 720[s]

Variables
  var1 "Variables 1"
    v = l/step

Geometry
  geom1 "Geometry 1" (1D, length unit m)
    i1: Interval | coord = {0, 0.08}; p2 = 0.08
    fin: Finalize "Form Union"

Physics
  tds: DilutedSpeciesPorousMedia "Transport of Diluted Species in Porous Media" on all domains
    dependent variable Na = {Na, Cl, K, Ca}
    EquationForm.form = Transient
    TransportMechanism.DispersionInPorousMedia = 1
    TransportMechanism.Migration = 0
    porous1: PorousMedium (default)
      fluid1: FluidPorousMedium "Fluid 1" (default)
        u = {v, 0, 0}
        DiffusionCoefficientSource = chem
        Dchem_Na = diag{0, 1e-9[m^2/s], 1e-9[m^2/s]}
        Dchem_Cl = diag{0, 1e-9[m^2/s], 1e-9[m^2/s]}
        Dchem_K = diag{0, 1e-9[m^2/s], 1e-9[m^2/s]}
        Dchem_Ca = diag{0, 1e-9[m^2/s], 1e-9[m^2/s]}
        FluidDiffusivityModelType = UserDefined
      pm1: PorousMatrixPorousMedium "Porous Matrix 1" (default) | poro_mat = userdef; poro = 1
      disp1: Dispersion on all domains
        SpecifyDispersionIndividually = 0
        DispersionTensor = Dispersivity
        DispersivityModel = Isotropic
        alphaL = 0.002
        alphaT = 0.002
        DD = 5.56E-
    nflx1: NoFlux (default)
    init1: init "Initial Values 1" (default) | initc = {1, 0, 0.2, 0}
    conc1: Concentration on boundaries 1 | species = {1, 1, 1, 1}; c0 = {0, 1.2, 0, 0.6}
    out1: Outflow on boundaries 2

Mesh
  mesh1 "Mesh 1"
    size: MeshSizeDefault | hmax = 0.002; hgrad = 1; custom = on
    edg1: Edge on remaining entities

Studies
  std1 "Study 1"
    time: Transient "Time Dependent" | tlist = range(0,720,720)

Solver configurations
  sol1 "Solution 1" (study std1)
    v1: Variables "Dependent Variables 1" | resscaleval = 100
    t1: Time "Time-Dependent Solver 1"
      tlist = range(0,720,720)
      rtol = 0.005
      atolglobalfactor = 0.001
      maxorder = 2
      stabcntrl = on
      fc1: FullyCoupled | linsolver = d1; maxiter = 8; damp = 0.9; jtech = once; aaccdim = 5; aaccmix = 0.9; aaccdelay = 1
      d1: Direct "Direct, concentrations (tds)" | linsolver = pardiso; thresh = 0.1; pardreorder = ndmt; rhob = 400

Datasets
  dset1: Solution | solution = sol1

Plots
  pg1: PlotGroup1D "Concentration (tds)" | data = dset1
    lngr1: LineGraph on domains 1 | expr = Na
  pg2: PlotGroup1D "1D Plot Group 2" | data = dset1
    ptgr1: PointGraph on boundaries 2 | expr = Na
    ptgr2: PointGraph on boundaries 2 | expr = K
    ptgr3: PointGraph on boundaries 2 | expr = Cl
    ptgr4: PointGraph on boundaries 2 | expr = Ca

Exports
  data1: Data
    // data1
    data = dset1
    expr = {Ca, Cl, K, Na}
    unit = {mol/m^3, mol/m^3, mol/m^3, mol/m^3}
    descr = {Concentration, Concentration, Concentration, Concentration}
    filename = D:\Pycharm\CPqPy/case1\Results\outcon.txt